// COMSOL Multiphysics 6.2.0.290 model "CCES_Play.mph"
// Outline of the model tree

Coordinate systems
  sys1: Boundary "Boundary System 1"

Geometry
  geom1 "Geometry 1" (3D, length unit mm)
    wp1: WorkPlane | unite = on
      imp1: Import | type = dxf; filename = Z:\Cross.dxf
      r1: Rectangle | pos = {2.475, 0}; size = {0.01, 0.5}
      r2: Rectangle | pos = {2.64, 1.385}; size = {0.02, 0.02}
    del1: Delete "Delete Entities 1" | input = wp1.uni edges 26, 28, 49
    del2: Delete "Delete Entities 2" | input = del1(1) boundaries 2
    blk1: Block | size = {5, 2.5, 1}
    blk2: Block | pos = {0, 0, -0.5}; size = {5, 2.5, 0.5}
    blk3: Block | pos = {0, 0, -0.55}; size = {5, 2.5, 0.05}
    fin: Finalize "Form Union"

Materials
  mat1: Common "Vacuum Block" on domains 3
    def "Basic"
      electricconductivity = 0
      relpermeability = 1
      relpermittivity = 1
  mat2: Common "Silicon Substrate" on domains 2
    def "Basic"
      electricconductivity = 0
      relpermeability = 1
      relpermittivity = 11.9
  mat3: Common "Ground below Chip" on domains 1
    def "Basic"
      electricconductivity = 10^99
      relpermeability = 1
      relpermittivity = 1
  mat4: Common "Superconductor" on boundaries 9, 15, 17-19
    def "Basic"
      electricconductivity = 10^99
      relpermeability = 1
      relpermittivity = 1

Physics
  es: Electrostatics on all domains
    dependent variable V
    ccn1: ChargeConservation (default)
    zc1: ZeroCharge (default)
    init1: init "Initial Values 1" (default)
    gnd1: Ground on boundaries 1-3, 6, 9, 11, 20
    term1: Terminal on boundaries 15 | TerminalType = Voltage
    term2: Terminal on boundaries 17 | TerminalType = Voltage

Mesh
  mesh1 "Mesh 1" (physics-controlled)
    size: MeshSizeDefault | hauto = 3

Studies
  std1 "Study 1"
    stssw: StationarySourceSweep | plist = 1 2

Solver configurations
  sol1 "Solution 1" (study std1)
    v1: Variables "Dependent Variables 1"
    s1: Stationary "Stationary Solver 1"
      p1: Parametric | pcontinuationmode = no
      fc1: FullyCoupled | linsolver = i1
      i1: Iterative | linsolver = cg
        mg1: Multigrid | prefun = amg; coarseningmethod = classic

Datasets
  dset1: Solution | solution = sol1

Evaluation groups
  eg1: EvaluationGroup "Inverse Maxwell capacitance (dset1, es)" | data = dset1
    gmev1: EvalGlobalMatrix "Inverse Maxwell capacitance (dset1, es)"
      expr = root.comp1.es.Cinv
      dataseries = sum
      outerdataseries = none
  eg2: EvaluationGroup "Maxwell capacitance (dset1, es)" | data = dset1
    gmev1: EvalGlobalMatrix "Maxwell capacitance (dset1, es)"
      expr = root.comp1.es.Cinv
      dataseries = sum
      outerdataseries = none
      trans = inverse
  eg3: EvaluationGroup "Mutual capacitance (dset1, es)" | data = dset1
    gmev1: EvalGlobalMatrix "Mutual capacitance (dset1, es)"
      expr = root.comp1.es.Cinv
      unit = 1/fF
      dataseries = sum
      outerdataseries = none
      trans = invmaxwellmutual

Plots
  pg1: PlotGroup3D "Electric Potential (es)" | data = dset1
    surf1: Surface | expr = V
  pg2: PlotGroup3D "Electric Field Norm (es)" | data = dset1
    surf1: Surface | expr = es.normE; descr = Electric Field Norm (v/m)