// COMSOL Multiphysics 6.2.0.290 model "CC_EC.mph"
// Outline of the model tree

Geometry
  geom1 "Geometry 1" (3D, length unit mm)
    wp1: WorkPlane | unite = on
      imp1: Import | type = dxf; filename = Q:\nano\Shreyas\CC_2.dxf
      del1: Delete "Delete Entities 1" | input = imp1(1) boundaries 42
      r1: Rectangle | pos = {1.5, 1.21}; size = {0.01, 0.06}
    blk1: Block | pos = {0, 0, -0.5}; size = {2, 1.84, 0.5}
    blk2: Block | size = {2, 1.84, 1}
    fin: Finalize "Form Union"

Materials
  mat1: Common "Vacuum" on domains 2
    def "Basic"
      relpermeability = 1
      relpermittivity = 1
      electricconductivity = 0
  mat2: Common "Silicon Substrate" on domains 1
    def "Basic"
      electricconductivity = 10^-12
      relpermeability = 1
      relpermittivity = 11.45
  mat3: Common "Superconducting Niobium" on boundaries 6, 11, 13, 14
    def "Basic"
      electricconductivity = 10^99
      relpermeability = 1
      relpermittivity = 1

Physics
  ec: ConductiveMedia "Electric Currents" on all domains
    dependent variable V
    cucn1: CurrentConservation (default)
    ein1: ElectricInsulation (default)
    init1: init "Initial Values 1" (default)
    term1: Terminal on boundaries 11 | TerminalType = Voltage; CharacteristicImpedanceFrom = fromPhysics
    term2: Terminal on boundaries 13 | TerminalType = Voltage
    fp1: FloatingPotential on boundaries 4-7, 9, 16 | TerminalType = userDefined
    gnd1: Ground on edges 68

Mesh
  mesh1 "Mesh 1" (physics-controlled)
    size: MeshSizeDefault | hauto = 4

Studies
  std1 "Study 1"
    freq: Frequency "Frequency Domain" | punit = GHz; plist = range(4,0.5,9)

Solver configurations
  sol1 "Solution 1" (study std1)
    v1: Variables "Dependent Variables 1"
    s1: Stationary "Stationary Solver 1" | linpmethod = sol
      p1: Parametric | pname = freq; plistarr = range(4,0.5,9); punit = GHz; pcontinuationmode = no
      fc1: FullyCoupled | linsolver = i1
      i1: Iterative | linsolver = bicgstab; nlinnormuse = on
        mg1: Multigrid

Datasets
  dset1: Solution | solution = sol1

Derived values
  gev1: EvalGlobal "Global Evaluation 1"
    data = dset1
    table = tbl1
    expr = {imag(ec.Y11)/ec.omega, imag(ec.Y21)/ec.omega, }
    unit = {fF, fF, }
    descr = {C_g, C_q, }

Tables
  tbl1: Table
    // Global Evaluation 1
    freq (GHz) | C_g (fF) | C_q (fF)
    4 | 4.48223 | 0.00710852
    4.5 | 4.48223 | 0.00710852
    5 | 4.48223 | 0.00710852
    5.5 | 4.48223 | 0.00710852
    6 | 4.48223 | 0.00710852
    6.5 | 4.48223 | 0.00710852
    7 | 4.48223 | 0.00710852
    7.5 | 4.48223 | 0.00710852
    8 | 4.48223 | 0.00710852
    8.5 | 4.48223 | 0.00710852
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
Plots
  pg1: PlotGroup3D "Electric Potential (ec)" | data = dset1
    vol1: Volume | expr = V
  pg2: PlotGroup3D "Electric Field Norm (ec)" | data = dset1
    mslc1: Multislice
      expr = ec.normE
      xnumber = 0
      xcoord = ec.CPx
      ynumber = 0
      ycoord = ec.CPy
      multiplanezmethod = coord
      zcoord = 0
    strmsl1: StreamlineMultislice
      expr = {ec.Ex, ec.Ey, ec.Ez}
      multiplanexmethod = coord
      xcoord = ec.CPx
      multiplaneymethod = coord
      ycoord = ec.CPy
      multiplanezmethod = coord
      zcoord = ec.CPz
      udist = 0.02
      col1: Color "Color Expression 1" | expr = ec.normE
      filt1: Filter | expr = !isScalingSystemDomain
  pg3: PlotGroup1D "Capacitances" | data = dset1
    glob1: Global | expr = {imag(ec.Y11)/ec.omega, imag(ec.Y21)/ec.omega}; unit = {F, F}; descr = {C_g, C_q}