// COMSOL Multiphysics 6.3.0.290 model "PSlis.mph"
// Outline of the model tree

Parameters
  tm_size = 46[mm]
  gap = 4[mm]
  electrode_len = 36[mm]
  TM_offset_x = 0.2[mm]
  electrode_w = 14[mm]
  domain_size = 200[mm]

Variables
  var1 "Variables 1"
    F_x = intop1(es.dnTx)
    F_y = intop1(es.dnTy)

Couplings
  intop1: Integration on boundaries 8-11

Geometry
  geom1 "Geometry 1" (2D, length unit m)
    sq1: Square | size = domain_size; base = center
    sq2: Square | size = tm_size; base = center; pos = {TM_offset_x, 0}
    r1: Rectangle | size = {electrode_w, electrode_len}; base = center; pos = {-(tm_size/2 + gap + electrode_w/2), 0}
    r2: Rectangle | size = {electrode_w, electrode_len}; base = center; pos = {(tm_size/2 + gap + electrode_w/2), 0}
    dif1: Difference | input = sq1; input2 = r1, r2, sq2
    pol1: Polygon
      type = open
      source = table
      table = 
        {tm_size/2 + gap, electrode_len/2}
        {tm_size/2 + gap, electrode_len/3}
        {tm_size/2 + gap, electrode_len/6}
        {tm_size/2 + gap, 0}
        {tm_size/2 + gap, -electrode_len/6}
        {tm_size/2 + gap, -electrode_len/3}
        {tm_size/2 + gap, -electrode_len/2}
    fin: Finalize "Form Union"

Materials
  mat1: Common "Perfect vacuum" on all domains
    def: def "Basic"
      density = 0[kg/m^3]
      relpermeability = 1
      relpermittivity = 1
      electricconductivity = 0[S/m]

Physics
  es: Electrostatics (disabled) on all domains
    dependent variable V
    fsp1: FreeSpace (default)
    zc1: ZeroCharge (default)
    init1: init "Initial Values 1" (default)
    gnd1: Ground on boundaries 1-3, 21
    fp1: FloatingPotential on boundaries 8-11 | Q0 = 1e7*1.602e-19
    pot1: ElectricPotential on boundaries 4-6
    pot2: ElectricPotential on boundaries 18 | V0 = 20[mV]
    pot3: ElectricPotential on boundaries 17 | V0 = -15[mV]
    pot4: ElectricPotential on boundaries 16 | V0 = 30[mV]
    pot5: ElectricPotential on boundaries 15 | V0 = 5[mV]
    pot6: ElectricPotential on boundaries 14 | V0 = -25[mV]
    pot7: ElectricPotential on boundaries 12 | V0 = 10[mV]
    pot8: ElectricPotential on boundaries 13, 19, 20
  es2: Electrostatics on all domains
    dependent variable V2
    fsp1: FreeSpace (default)
    zc1: ZeroCharge (default)
    init1: init "Initial Values 1" (default)
    gnd1: Ground on boundaries 1-3, 21
    term1: Terminal on boundaries 8-11 | Q0 = 1
    term2: Terminal on boundaries 4-7 | TerminalType = Voltage; V0 = 0
    term3: Terminal on boundaries 12-20 | TerminalType = Voltage; V0 = 0

Mesh
  mesh1 "Mesh 1"
    size: MeshSizeDefault | hmax = 0.0134; hmin = 6.0E-5; hcurve = 0.3; hgrad = 1.3
    ftri1: FreeTri "Free Triangular 1" on remaining entities | smoothmaxiter = 4; smoothmaxdepth = 4
      size1: Size on entire geometry
      size2: Size on boundaries 5-19 | hauto = 1

Studies
  std1 "Study 1"
    param: Parametric "Parametric Sweep" | pname = TM_offset_x; plistarr = range(-0.5[mm],0.1[mm],0.5[mm]); punit = m
    stat: Stationary
  std2 "Study 2"
    stssw: StationarySourceSweep | plist = 1 2 3

Solver configurations
  sol1 "Solution 1" (study std1)
    v1: Variables "Dependent Variables 1"
    s1: Stationary "Stationary Solver 1"
      dDef: Direct
      fc1: FullyCoupled
  sol2 "Parametric Solutions 1" (study std1)
  sol14 "Solution 14" (study std2)
    v1: Variables "Dependent Variables 1"
    s1: Stationary "Stationary Solver 1"
      dDef: Direct
      p1: Parametric
      fc1: FullyCoupled

Datasets
  dset1: Solution | solution = sol1
  dset2: Solution | solution = sol2
  dset3: Solution | solution = sol14

Derived values
  gev1: EvalGlobal "Global Evaluation 1"
    data = dset2
    table = tbl1
    expr = {F_x*electrode_len, F_y*electrode_len}
    descr = {Force in x-direction, Force in y-direction}

Evaluation groups
  eg1: EvaluationGroup "Inverse Maxwell capacitance (dset3, es2)" | data = dset3
    gmev1: EvalGlobalMatrix "Inverse Maxwell capacitance (dset3, es2)"
      expr = root.comp1.es2.Cinv
      dataseries = sum
      outerdataseries = none
  eg2: EvaluationGroup "Maxwell capacitance (dset3, es2)" | data = dset3
    gmev1: EvalGlobalMatrix "Maxwell capacitance (dset3, es2)"
      expr = root.comp1.es2.Cinv
      dataseries = sum
      outerdataseries = none
      trans = inverse
  eg3: EvaluationGroup "Mutual capacitance (dset3, es2)" | data = dset3
    gmev1: EvalGlobalMatrix "Mutual capacitance (dset3, es2)"
      expr = root.comp1.es2.Cinv
      dataseries = sum
      outerdataseries = none
      trans = invmaxwellmutual

Tables
  tbl1: Table
    // Global Evaluation 1
    TM_offset_x (m) | Force in x-direction (N) | Force in y-direction (N)
    -0.0005 | 5.4696e-14 | -1.05624e-16
    -0.0004 | 5.85971e-14 | -8.45703e-17
    -0.0003 | 6.26854e-14 | -1.28492e-16
    -0.0002 | 6.71945e-14 | -5.11202e-17
    -0.0001 | 7.2207e-14 | -6.06195e-17
    0 | 7.72382e-14 | -4.85482e-17
    0.0001 | 8.27004e-14 | -7.57753e-17
    0.0002 | 8.84822e-14 | -8.28385e-17
    0.0003 | 9.36365e-14 | -8.69972e-17
    0.0004 | 1.00512e-13 | -8.63218e-17
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
Plots
  pg1: PlotGroup2D "Electric Potential (es)" | data = dset1
    surf1: Surface | expr = V
    str1: Streamline on boundaries 1-21 | expr = {es.Ex, es.Ey}; udist = 0.02; maxsteps = 5000
      col1: Color "Color Expression 1" | expr = V
      filt1: Filter | expr = !isScalingSystemDomain
  pg2: PlotGroup2D "Electric Field (es)" | data = dset1
    surf1: Surface | expr = es.normE
    str1: Streamline on boundaries 1-21 | expr = {es.Ex, es.Ey}; udist = 0.02; maxsteps = 5000
      col1: Color "Color Expression 1" | expr = es.normE
      filt1: Filter | expr = !isScalingSystemDomain
  pg3: PlotGroup2D "Electric Potential (es) 1" | data = dset2
    surf1: Surface | expr = V
    str1: Streamline on boundaries 1-21 | expr = {es.Ex, es.Ey}; udist = 0.02; maxsteps = 5000
      col1: Color "Color Expression 1" | expr = V
      filt1: Filter | expr = !isScalingSystemDomain
  pg4: PlotGroup2D "Electric Field (es) 1" | data = dset2
    surf1: Surface | expr = es.normE
    str1: Streamline on boundaries 1-21 | expr = {es.Ex, es.Ey}; udist = 0.02; maxsteps = 5000
      col1: Color "Color Expression 1" | expr = es.normE
      filt1: Filter | expr = !isScalingSystemDomain
  pg5: PlotGroup2D "density" on all boundaries | data = dset2
    line1: Line | expr = es.nD
  pg6: PlotGroup2D "Electric Potential (es2)" | data = dset3
    surf1: Surface | expr = V2/es2.VexcTerm
    str1: Streamline on boundaries 1-21 | expr = {es2.Ex, es2.Ey}; udist = 0.02; maxsteps = 5000
      col1: Color "Color Expression 1" | expr = V2/es2.VexcTerm
      filt1: Filter | expr = !isScalingSystemDomain
  pg7: PlotGroup2D "Electric Field (es2)" | data = dset3
    surf1: Surface | expr = es2.normE
    str1: Streamline on boundaries 1-21 | expr = {es2.Ex, es2.Ey}; udist = 0.02; maxsteps = 5000
      col1: Color "Color Expression 1" | expr = es2.normE
      filt1: Filter | expr = !isScalingSystemDomain